# -*- coding: utf-8 -*-
"""
Step 4: Adding the ActuatedArm prefab.
This prefab is defining the servomotor, the servo-arm and the constraint that attaches the end of the arm to the deformable object.
"""
from tutorial import *
# Let's define a Tripod prefab in tripod.py, that we can later call in the createScene function
from tripod import Tripod


def createScene(rootNode):
    scene = Scene(rootNode)

    scene.VisualStyle.displayFlags = "showBehavior"

    tripod = Tripod(scene.Modelling)
    tripod.BoxROI0.drawBoxes = True
    tripod.BoxROI1.drawBoxes = True
    tripod.BoxROI2.drawBoxes = True

    scene.Simulation.addChild(tripod.RigidifiedStructure)
    motors = scene.Simulation.createChild("Motors")
    motors.addChild(tripod.ActuatedArm0)
    motors.addChild(tripod.ActuatedArm1)
    motors.addChild(tripod.ActuatedArm2)
